// SBML level 3 version 2
// Created with https://github.com/matthiaskoenig/sbmlutils.

model edoxaban_intestine(PODOSE_edo, Ka_dis_edo, Mr_edo, Vext, Vlumen, Vfeces, Vstomach, edo_ext, edo_lumen, edo_feces, m4_lumen, m6_lumen, mx_lumen, m4_feces, m6_feces, mx_feces)
  // Model for edoxaban absorption
  // The content of this model has been carefully created in a manual research effort.
  // Terms of use
  // Copyright © 2026 Matthias König.
  // This work is licensed under a Creative Commons Attribution 4.0 International License.
  // Redistribution and use of any part of this model, with or without modification, are permitted provided that the following conditions are met:
  // Redistributions of this SBML file must retain the above copyright notice, this list of conditions and the following disclaimer.
  // Redistributions in a different form must reproduce the above copyright notice, this list of conditions and the following disclaimer in the documentation and/or other materials provided with the distribution.
  // This model is distributed in the hope that it will be useful, but WITHOUT ANY WARRANTY; without even the implied warranty of MERCHANTABILITY or FITNESS FOR A PARTICULAR PURPOSE.
  // occursIn FMA:45615 BTO:0000545 ncit:C12736 FMA:7199 BTO:0000648
  // hasProperty ncit:C79369 ncit:C79372 mamo:MAMO_0000046 ncit:C96539 CHEBI:85973 pubchem.compound:10280735
  // hasTaxon taxonomy:9606 snomedct:337915000
  // isDescribedBy doi:10.5281/zenodo.18165479
  // model units - substance: mmole, time: min, volume: litre, area: m2, length: metre, extent: mmole

  // Compartments:
  compartment Vext = 1 litre; Vext is "plasma";  // SBO:0000290 ncit:C13356 BTO:0000131
  compartment Vlumen = 1 litre;  // SBO:0000290 FMA:14586 UBERON:0018543
  compartment Vfeces = 1 litre;  // SBO:0000290 FMA:64183 ncit:C13234 BTO:0000440
  compartment Vstomach = 1 litre;  // SBO:0000290 FMA:7148 ncit:C12391 UBERON:0000945
  compartment Vapical = NaN; Vapical has m2; Vapical is "apical membrane (intestinal membrane enterocytes)";  // 2-D; SBO:0000290 FMA:84666 GO:0016324

  // Species:
  substanceOnly species $edo_stomach in Vstomach = 0; edo_stomach is "edoxaban (stomach)";  // SBO:0000247 CHEBI:85973 pubchem.compound:10280735 inchikey:HGVDHZBSSITLCT-JLJPHGGASA-N
  species edo_ext in Vext = 0; edo_ext is "edoxaban (plasma)";  // SBO:0000247 CHEBI:85973 pubchem.compound:10280735 inchikey:HGVDHZBSSITLCT-JLJPHGGASA-N
  species edo_lumen in Vlumen = 0; edo_lumen is "edoxaban (intestinal volume)";  // SBO:0000247 CHEBI:85973 pubchem.compound:10280735 inchikey:HGVDHZBSSITLCT-JLJPHGGASA-N
  substanceOnly species edo_feces in Vfeces = 0; edo_feces is "edoxaban (feces)";  // SBO:0000247 CHEBI:85973 pubchem.compound:10280735 inchikey:HGVDHZBSSITLCT-JLJPHGGASA-N
  species m4_lumen in Vlumen = 0; m4_lumen is "M4 (intestinal volume)";  // SBO:0000247 CHEBI:85973 pubchem.compound:59676899 inchikey:QPYMJNYAASVNAP-CORIIIEPSA-N
  species m6_lumen in Vlumen = 0; m6_lumen is "M6 (intestinal volume)";  // SBO:0000247 pubchem.compound:16661115 inchikey:GMRJAYKIRXDGFT-DUVNUKRYSA-N
  species mx_lumen in Vlumen = 0; mx_lumen is "Mx (intestinal volume)";  // SBO:0000247
  substanceOnly species m4_feces in Vfeces = 0; m4_feces is "M4 (feces)";  // SBO:0000247 CHEBI:85973 pubchem.compound:59676899 inchikey:QPYMJNYAASVNAP-CORIIIEPSA-N
  substanceOnly species m6_feces in Vfeces = 0; m6_feces is "M6 (feces)";  // SBO:0000247 pubchem.compound:16661115 inchikey:GMRJAYKIRXDGFT-DUVNUKRYSA-N
  substanceOnly species mx_feces in Vfeces = 0; mx_feces is "Mx (feces)";  // SBO:0000247

  // Parameters:
  F_edo_abs = 0.82 dimensionless; F_edo_abs is "fraction absorbed edoxaban";  // SBO:0000002
  EDOABS_k = 0.05 per_min; EDOABS_k is "rate of edoxaban absorption";  // SBO:0000009
  // 1.0: normal absorption corresponding to tablet under fasting conditions.
  // allows to change the velocity of absorption
  f_absorption = 1 dimensionless; f_absorption is "scaling factor for absorption rate";  // SBO:0000009
  PODOSE_edo = 0 mg; PODOSE_edo is "oral dose edoxaban [mg]";  // SBO:0000002
  Ka_dis_edo = 0.15 per_hr; Ka_dis_edo is "Ka_dis [1/hr] dissolution edoxaban";  // SBO:0000002
  Mr_edo = 548.058 g_per_mole; Mr_edo is "Molecular weight edoxaban [g/mole]";  // SBO:0000647
  M4EXC_k = 0.1 per_min; M4EXC_k is "rate of M4 excretion";  // SBO:0000009
  M6EXC_k = 0.1 per_min; M6EXC_k is "rate of M6 excretion";  // SBO:0000009
  MXEXC_k = 0.1 per_min; MXEXC_k is "rate of Mx excretion";  // SBO:0000009
  absorption_edo has mmole_per_min; absorption_edo is "absorption edoxaban";

  // Assignment rules:
  absorption_edo := f_absorption*EDOABS_k*Vlumen*edo_lumen;

  // Rate rules:
  PODOSE_edo' = -dissolution_edo*Mr_edo;

  // Reactions:
  EDOABS: edo_lumen => edo_ext; F_edo_abs*absorption_edo; EDOABS is "absorption edoxaban";  // SBO:0000655
  EDOEXC: edo_lumen => edo_feces; (1 - F_edo_abs)*absorption_edo; EDOEXC is "excretion edoxaban (feces)";  // SBO:0000655
  M4EXC: m4_lumen => m4_feces; f_absorption*M4EXC_k*Vlumen*m4_lumen; M4EXC is "excretion M4 (feces)";  // SBO:0000655
  M6EXC: m6_lumen => m6_feces; f_absorption*M6EXC_k*Vlumen*m6_lumen; M6EXC is "excretion M6 (feces)";  // SBO:0000655
  MXEXC: mx_lumen => mx_feces; f_absorption*MXEXC_k*Vlumen*mx_lumen; MXEXC is "excretion Mx (feces)";  // SBO:0000655
  // Swallowing, dissolution of tablet, and transport into intestine. Overall process describing the rates of this processes.
  dissolution_edo: $edo_stomach => edo_lumen; Ka_dis_edo/(60 min_per_hr)*PODOSE_edo/Mr_edo; dissolution_edo is "dissolution edoxaban";

  // Unit definitions:
  unit g_per_mole = gram / mole; g_per_mole is "g/mole";
  unit l_per_min = litre / (60 second); l_per_min is "l/min";
  unit m2 = metre^2; m2 is "meter^2";
  unit mM = 1e-3 mole / litre; mM is "mmole/liter";
  unit mg = 1e-3 gram;
  unit mg_per_min = 1e-3 gram / (60 second); mg_per_min is "mg/min";
  unit mg_per_s_l = 1e-3 gram / (second * litre); mg_per_s_l is "mg/s/l";
  unit min = 60 second;
  unit min_per_hr = 60 second / (3600 second); min_per_hr is "min/hour";
  unit mmole = 1e-3 mole;
  unit mmole_per_min = 1e-3 mole / (60 second); mmole_per_min is "mmole/min";
  unit mmole_per_min_l = 1e-3 mole / (60 second * litre); mmole_per_min_l is "mmole/min/l";
  unit per_hr = 1 / (3600 second); per_hr is "1/hr";
  unit per_min = 1 / (60 second); per_min is "1/min";
  unit per_mmole = 1 / (1e-3 mole); per_mmole is "1/mmole";
end
