// SBML level 3 version 2
// Created with https://github.com/matthiaskoenig/sbmlutils.

model edoxaban_liver(Vext, Vli, Vmem, Vbi, Vlumen, edo_ext, m4_ext, m4_lumen, m6_ext, m6_lumen, mx_ext, mx_lumen)
  // Model for hepatic edoxaban metabolism.
  // The content of this model has been carefully created in a manual research effort.
  // Terms of use
  // Copyright © 2026 Matthias König.
  // This work is licensed under a Creative Commons Attribution 4.0 International License.
  // Redistribution and use of any part of this model, with or without modification, are permitted provided that the following conditions are met:
  // Redistributions of this SBML file must retain the above copyright notice, this list of conditions and the following disclaimer.
  // Redistributions in a different form must reproduce the above copyright notice, this list of conditions and the following disclaimer in the documentation and/or other materials provided with the distribution.
  // This model is distributed in the hope that it will be useful, but WITHOUT ANY WARRANTY; without even the implied warranty of MERCHANTABILITY or FITNESS FOR A PARTICULAR PURPOSE.
  // occursIn FMA:7197 BTO:0000759 ncit:C12392
  // hasProperty ncit:C79371 ncit:C79372 mamo:MAMO_0000046 ncit:C96539 CHEBI:85973 pubchem.compound:10280735
  // hasTaxon taxonomy:9606 snomedct:337915000
  // isDescribedBy doi:10.5281/zenodo.18165479
  // model units - substance: mmole, time: min, volume: litre, area: m2, length: metre, extent: mmole

  // Compartments:
  compartment Vext = 1.5 litre; Vext is "plasma";  // SBO:0000290 ncit:C13356 BTO:0000131
  compartment Vli = 1.5 litre; Vli is "liver";  // SBO:0000290 FMA:7197 BTO:0000759 ncit:C12392
  compartment Vmem = NaN; Vmem has m2; Vmem is "membrane";  // 2-D; SBO:0000290 FMA:84669 GO:0016323
  compartment Vbi = 1 litre; Vbi is "bile";  // SBO:0000290 FMA:62971 ncit:C13192
  compartment Vlumen = 1 litre; Vlumen is "gut lumen";  // SBO:0000290 FMA:45615 BTO:0000545 ncit:C12736

  // Species:
  species edo_ext in Vext = 0; edo_ext is "edoxaban (plasma)";  // SBO:0000247 CHEBI:85973 pubchem.compound:10280735 inchikey:HGVDHZBSSITLCT-JLJPHGGASA-N
  species edo in Vli = 0; edo is "edoxaban (liver)";  // SBO:0000247 CHEBI:85973 pubchem.compound:10280735 inchikey:HGVDHZBSSITLCT-JLJPHGGASA-N
  species m4_ext in Vext = 0; m4_ext is "M4 (plasma)";  // SBO:0000247 CHEBI:85973 pubchem.compound:59676899 inchikey:QPYMJNYAASVNAP-CORIIIEPSA-N
  species m4 in Vli = 0; m4 is "M4 (liver)";  // SBO:0000247 CHEBI:85973 pubchem.compound:59676899 inchikey:QPYMJNYAASVNAP-CORIIIEPSA-N
  substanceOnly species m4_bi in Vbi = 0; m4_bi is "M4 (bile)";  // SBO:0000247 CHEBI:85973 pubchem.compound:59676899 inchikey:QPYMJNYAASVNAP-CORIIIEPSA-N
  substanceOnly species m4_lumen in Vlumen = 0; m4_lumen is "M4 (gut)";  // SBO:0000247 CHEBI:85973 pubchem.compound:59676899 inchikey:QPYMJNYAASVNAP-CORIIIEPSA-N
  species m6_ext in Vext = 0; m6_ext is "M6 (plasma)";  // SBO:0000247 pubchem.compound:16661115 inchikey:GMRJAYKIRXDGFT-DUVNUKRYSA-N
  species m6 in Vli = 0; m6 is "M6 (liver)";  // SBO:0000247 pubchem.compound:16661115 inchikey:GMRJAYKIRXDGFT-DUVNUKRYSA-N
  substanceOnly species m6_bi in Vbi = 0; m6_bi is "M6 (bile)";  // SBO:0000247 pubchem.compound:16661115 inchikey:GMRJAYKIRXDGFT-DUVNUKRYSA-N
  substanceOnly species m6_lumen in Vlumen = 0; m6_lumen is "M6 (gut)";  // SBO:0000247 pubchem.compound:16661115 inchikey:GMRJAYKIRXDGFT-DUVNUKRYSA-N
  species mx_ext in Vext = 0; mx_ext is "Mx (plasma)";  // SBO:0000247
  species mx in Vli = 0; mx is "Mx (liver)";  // SBO:0000247
  substanceOnly species mx_bi in Vbi = 0; mx_bi is "Mx (bile)";  // SBO:0000247
  substanceOnly species mx_lumen in Vlumen = 0; mx_lumen is "Mx (gut)";  // SBO:0000247

  // Parameters:
  MXEXBI_k = 0.0001 per_min; MXEXBI_k is "rate for edoxaban metabolites export in bile";  // SBO:0000009
  EDOIM_Vmax = 1000 per_min; EDOIM_Vmax is "Vmax edoxaban import";  // SBO:0000186
  EDO2M4_Vmax = 0.1 per_min; EDO2M4_Vmax is "Vmax edo-> m4 conversion";  // SBO:0000186
  // Setting relative rates based on abundance of the metabolites:
  // f = AUC_M6/AUC_M4 = 55.1/145.5
  EDO2M6_f = 0.3786942 dimensionless; EDO2M6_f is "Vmax scaling edo -> m6 conversion";  // SBO:0000002
  // Setting relative rates based on recovery of metabolites
  // f_mx = (97.6 - 72.8 - 3.49 - 2.11)/3.49 = 5.50
  EDO2MX_f = 5.501433 dimensionless; EDO2MX_f is "Vmax scaling edo -> mx conversion";  // SBO:0000002
  M4EX_Vmax = 1000 per_min; M4EX_Vmax is "Vmax M4 export";  // SBO:0000186
  M6EX_Vmax = 1000 per_min; M6EX_Vmax is "Vmax M6 export";  // SBO:0000186
  MXEX_Vmax = 1000 per_min; MXEX_Vmax is "Vmax Mx export";  // SBO:0000186

  // Reactions:
  // Assuming fast equilibration.
  EDOIM: edo_ext -> edo; EDOIM_Vmax*Vli*(edo_ext - edo); EDOIM is "edoxaban import (EDOIM)";  // SBO:0000655
  // Main metabolite M4.
  EDO2M4: edo => m4; EDO2M4_Vmax*Vli*edo; EDO2M4 is "edoxaban -> M4 (CES1)";  // SBO:0000176
  EDO2M6: edo => m6; EDO2M6_f*EDO2M4_Vmax*Vli*edo; EDO2M6 is "edoxaban -> M6 (CYP3A4/5)";  // SBO:0000176
  EDO2MX: edo => mx; EDO2MX_f*EDO2M4_Vmax*Vli*edo; EDO2MX is "edoxaban -> Mx";  // SBO:0000176
  // Assuming fast equilibration.
  M4EX: m4 -> m4_ext; M4EX_Vmax*Vli*(m4 - m4_ext); M4EX is "M4 export (M4EX)";  // SBO:0000655
  // Assuming fast equilibration.
  M6EX: m6 -> m6_ext; M6EX_Vmax*Vli*(m6 - m6_ext); M6EX is "M6 export (M6EX)";  // SBO:0000655
  // Assuming fast equilibration.
  MXEX: mx -> mx_ext; MXEX_Vmax*Vli*(mx - mx_ext); MXEX is "Mx export (MXEX)";  // SBO:0000655
  M4EXBI: m4 => m4_bi; MXEXBI_k*Vli*m4; M4EXBI is "M4 bile export";  // SBO:0000655
  M4EXEHC: m4_bi => m4_lumen; M4EXBI; M4EXEHC is "M4 enterohepatic circulation";  // SBO:0000655
  M6EXBI: m6 => m6_bi; MXEXBI_k*Vli*m6; M6EXBI is "M6 bile export";  // SBO:0000655
  M6EXEHC: m6_bi => m6_lumen; M6EXBI; M6EXEHC is "M6 enterohepatic circulation";  // SBO:0000655
  MXEXBI: mx => mx_bi; MXEXBI_k*Vli*mx; MXEXBI is "MX bile export";  // SBO:0000655
  MXEXEHC: mx_bi => mx_lumen; MXEXBI; MXEXEHC is "MX enterohepatic circulation";  // SBO:0000655

  // Unit definitions:
  unit g_per_mole = gram / mole; g_per_mole is "g/mole";
  unit l_per_min = litre / (60 second); l_per_min is "l/min";
  unit m2 = metre^2; m2 is "meter^2";
  unit mM = 1e-3 mole / litre; mM is "mmole/liter";
  unit mg = 1e-3 gram;
  unit mg_per_s_l = 1e-3 gram / (second * litre); mg_per_s_l is "mg/s/l";
  unit min = 60 second;
  unit min_per_hr = 60 second / (3600 second); min_per_hr is "min/hour";
  unit mmole = 1e-3 mole;
  unit mmole_per_min = 1e-3 mole / (60 second); mmole_per_min is "mmole/min";
  unit mmole_per_min_l = 1e-3 mole / (60 second * litre); mmole_per_min_l is "mmole/min/l";
  unit per_min = 1 / (60 second); per_min is "1/min";
  unit per_mmole = 1 / (1e-3 mole); per_mmole is "1/mmole";
end
